// SBML level 2 version 4

function Constant_flux__irreversible(v)
  v;
end
Constant_flux__irreversible is "Constant flux (irreversible)";

function Hill_Cooperativity(substrate, Shalve, V, h)
  V*(substrate/Shalve)^h/(1 + (substrate/Shalve)^h);
end

function Basal_deacetylation_function(v, SIRT1_activity)
  v + SIRT1_activity*0.75;
end

model Mitonuclear_communication_model()
  // Developed by Alvaro Martinez Guimera - 2019 (Newcastle University)

  // Compartments:
  compartment compartment = 1;

  // Species:
  species AMPK in compartment = 10;
  species AMPK_P in compartment = 1; AMPK_P is "AMPK-P";
  species PGC1a in compartment = 10;
  species PGC1a_P in compartment = 1; PGC1a_P is "PGC1a-P";
  species PGC1a_deacet in compartment = 1;
  species $SIRT1_activity in compartment;
  species NAD in compartment = 1;
  species SIRT1 in compartment = 1;
  species Delay_in_NAD_increase in compartment = 1;
  species PARP in compartment = 1;
  species PGC1a_Deacetylation_Activity in compartment = 0; PGC1a_Deacetylation_Activity is "Deacetylation_Delay";
  species AICAR_Delay in compartment = 0;
  species AICAR_treatment in compartment = 0;
  species Glucose in compartment = 25;
  species GlucoseDelay in compartment = 1;
  species NAD_NegReg in compartment = 0;
  species NR_NMN in compartment = 0; NR_NMN is "NR-NMN";
  species Damage in compartment = 0.00251883;
  species Mito_old in compartment = 0;
  species Mitophagy in compartment = 1;
  species Mito_new in compartment = 100;
  species Mito_turnover in compartment = 1;

  // Parameters:
  quantity_to_number_factor = 1;

  // Assignment rules:
  SIRT1_activity := SIRT1*quantity_to_number_factor*compartment*NAD*quantity_to_number_factor*compartment;

  // Reactions:
  AMPK_phosphorylation: AMPK => AMPK_P; compartment*AMPK_phosphorylation_k1*AMPK; AMPK_phosphorylation is "AMPK basal phosphorylation";
    AMPK_phosphorylation_k1 = 1;
  AMPK_dephosphorylation: AMPK_P => AMPK; compartment*AMPK_dephosphorylation_k1*AMPK_P; AMPK_dephosphorylation is "AMPK basal dephosphorylation";
    AMPK_dephosphorylation_k1 = 5;
  PGC1a_phosphorylation: AMPK_P + PGC1a => PGC1a_P + AMPK_P; compartment*PGC1a_phosphorylation_k1*AMPK_P*PGC1a;
    PGC1a_phosphorylation_k1 = 1;
  PGC1a_dephosphorylation: PGC1a_P => PGC1a; compartment*PGC1a_dephosphorylation_k1*PGC1a_P;
    PGC1a_dephosphorylation_k1 = 10;
  Induced_PGC1a_deacetylation: PGC1a_P + PGC1a_Deacetylation_Activity => PGC1a_deacet + PGC1a_Deacetylation_Activity; compartment*Induced_PGC1a_deacetylation_k1*PGC1a_P*PGC1a_Deacetylation_Activity; Induced_PGC1a_deacetylation is "PGC1a induced deacetylation";
    Induced_PGC1a_deacetylation_k1 = 1.913;
  PGC1a_acetylation: PGC1a_deacet => PGC1a_P; compartment*PGC1a_acetylation_k1*PGC1a_deacet; PGC1a_acetylation is "PGC1a basal acetylation";
    PGC1a_acetylation_k1 = 1;
  DUMMY_REACTION_Delay_in_NAD_Increase: AMPK_P => Delay_in_NAD_increase + AMPK_P; compartment*DUMMY_REACTION_Delay_in_NAD_Increase_k1*AMPK_P; DUMMY_REACTION_Delay_in_NAD_Increase is "Delay Reaction NAD increase by AMPK";
    DUMMY_REACTION_Delay_in_NAD_Increase_k1 = 10;
  DUMMY_REACTION_Delay_in_NAD_Increase_2: Delay_in_NAD_increase => ; compartment*DUMMY_REACTION_Delay_in_NAD_Increase_2_k1*Delay_in_NAD_increase; DUMMY_REACTION_Delay_in_NAD_Increase_2 is "Dummy Reaction Delay_in_NAD_Increase Removal";
    DUMMY_REACTION_Delay_in_NAD_Increase_2_k1 = 10;
  NAD_synthesis: => NAD; compartment*Constant_flux__irreversible(NAD_synthesis_v);
    NAD_synthesis_v = 0.12;
  NAD_utilisation: NAD => ; compartment*NAD_utilisation_k1*NAD;
    NAD_utilisation_k1 = 0.045;
  NAD_utilisation_by_PARP: NAD + PARP => PARP; compartment*NAD_utilisation_by_PARP_k1*NAD*PARP;
    NAD_utilisation_by_PARP_k1 = 0.075;
  NAD_increase_by_AMPK: Delay_in_NAD_increase => NAD + Delay_in_NAD_increase + NAD_NegReg; compartment*Hill_Cooperativity(Delay_in_NAD_increase, NAD_increase_by_AMPK_Shalve, NAD_increase_by_AMPK_V, NAD_increase_by_AMPK_h);
    NAD_increase_by_AMPK_Shalve = 1.45; NAD_increase_by_AMPK_V = 0.316228; NAD_increase_by_AMPK_h = 100;
  Deacetylation_activity: $SIRT1_activity => PGC1a_Deacetylation_Activity + $SIRT1_activity; compartment*Hill_Cooperativity(SIRT1_activity, Deacetylation_activity_Shalve, Deacetylation_activity_V, Deacetylation_activity_h); Deacetylation_activity is "Delay Reaction Induced Deacetylation";
    Deacetylation_activity_Shalve = 3; Deacetylation_activity_V = 0.01; Deacetylation_activity_h = 30;
  DUMMY_REACTION_AICAR_stimulus_removal: AICAR_Delay => ; compartment*DUMMY_REACTION_AICAR_stimulus_removal_k1*AICAR_Delay; DUMMY_REACTION_AICAR_stimulus_removal is "Dummy Reaction AICAR Stimulus Removal";
    DUMMY_REACTION_AICAR_stimulus_removal_k1 = 0.293095;
  AMPK_phosphorylation_induced_by_AICAR: AICAR_Delay + AMPK => AMPK_P + AICAR_Delay; compartment*AMPK_phosphorylation_induced_by_AICAR_k1*AICAR_Delay*AMPK; AMPK_phosphorylation_induced_by_AICAR is "AMPK induced phosphorylation by AICAR";
    AMPK_phosphorylation_induced_by_AICAR_k1 = 3.98586;
  DUMMY_REACTION_Delay_AICAR_stimulus: AICAR_treatment => AICAR_Delay + AICAR_treatment; compartment*Hill_Cooperativity(AICAR_treatment, DUMMY_REACTION_Delay_AICAR_stimulus_Shalve, DUMMY_REACTION_Delay_AICAR_stimulus_V, DUMMY_REACTION_Delay_AICAR_stimulus_h); DUMMY_REACTION_Delay_AICAR_stimulus is "Delay Reaction AICAR Stimulus";
    DUMMY_REACTION_Delay_AICAR_stimulus_Shalve = 0.6672; DUMMY_REACTION_Delay_AICAR_stimulus_V = 0.167159; DUMMY_REACTION_Delay_AICAR_stimulus_h = 9.23537;
  Basal_PGC1a_deacetylation: PGC1a_P => PGC1a_deacet; compartment*Basal_deacetylation_function(Basal_PGC1a_deacetylation_v, SIRT1_activity); Basal_PGC1a_deacetylation is "PGC1a basal deacetylation";  // modifiers: SIRT1_activity
    Basal_PGC1a_deacetylation_v = 0.25;
  DUMMY_REACTION_PGC1a_Deacetylation_Limiter: PGC1a_Deacetylation_Activity => ; compartment*DUMMY_REACTION_PGC1a_Deacetylation_Limiter_k1*PGC1a_Deacetylation_Activity; DUMMY_REACTION_PGC1a_Deacetylation_Limiter is "Dummy Reaction Induced Deacetylation Delay Removal";
    DUMMY_REACTION_PGC1a_Deacetylation_Limiter_k1 = 0.56472;
  Glucose_induced_AMPK_dephosphorylation: GlucoseDelay + AMPK_P => AMPK + GlucoseDelay; compartment*Glucose_induced_AMPK_dephosphorylation_k1*GlucoseDelay*AMPK_P; Glucose_induced_AMPK_dephosphorylation is "Glucose-induced AMPK dephosphorylation";
    Glucose_induced_AMPK_dephosphorylation_k1 = 5;
  Glucose_input: => Glucose; compartment*Constant_flux__irreversible(Glucose_input_v); Glucose_input is "Glucose influx";
    Glucose_input_v = 25;
  Glucose_utilisation: Glucose => ; compartment*Glucose_utilisation_k1*Glucose;
    Glucose_utilisation_k1 = 1;
  Glucose_DUMMY_REACTION_delay: Glucose => GlucoseDelay + Glucose; compartment*Hill_Cooperativity(Glucose, Glucose_DUMMY_REACTION_delay_Shalve, Glucose_DUMMY_REACTION_delay_V, Glucose_DUMMY_REACTION_delay_h); Glucose_DUMMY_REACTION_delay is "Delay Reaction Glucose Stimulus";
    Glucose_DUMMY_REACTION_delay_Shalve = 5.36174; Glucose_DUMMY_REACTION_delay_V = 0.1013; Glucose_DUMMY_REACTION_delay_h = 15.04;
  Glucose_DUMMY_REACTION_delay_limiter: GlucoseDelay => ; compartment*Glucose_DUMMY_REACTION_delay_limiter_k1*GlucoseDelay; Glucose_DUMMY_REACTION_delay_limiter is "Dummy Reaction Glucose Delay Removal";
    Glucose_DUMMY_REACTION_delay_limiter_k1 = 0.1;
  NAD_negative_regulation: NAD + NAD_NegReg => ; compartment*NAD_negative_regulation_k1*NAD*NAD_NegReg;
    NAD_negative_regulation_k1 = 0.0609264;
  DUMMY_REACTION_NegReg_disappearance: NAD_NegReg => ; compartment*DUMMY_REACTION_NegReg_disappearance_k1*NAD_NegReg; DUMMY_REACTION_NegReg_disappearance is "Dummy Reaction NegReg Removal";
    DUMMY_REACTION_NegReg_disappearance_k1 = 0.1;
  NR_NMN_supplementation: NR_NMN => NAD; compartment*Hill_Cooperativity(NR_NMN, NR_NMN_supplementation_Shalve, NR_NMN_supplementation_V, NR_NMN_supplementation_h); NR_NMN_supplementation is "NR/NMN supplementation";
    NR_NMN_supplementation_Shalve = 100; NR_NMN_supplementation_V = 0.10829; NR_NMN_supplementation_h = 1.5;
  Damage_propagation: Mito_old => 2 Damage + Mito_old; compartment*Damage_propagation_k1*Mito_old;
    Damage_propagation_k1 = 1e-6;
  Delay_Reaction_Mitophagy: PGC1a_deacet => Mitophagy + PGC1a_deacet; compartment*Delay_Reaction_Mitophagy_k1*PGC1a_deacet;
    Delay_Reaction_Mitophagy_k1 = 0.1;
  Dummy_Reaction_Mitophagy_Removal: Mitophagy => ; compartment*Dummy_Reaction_Mitophagy_Removal_k1*Mitophagy;
    Dummy_Reaction_Mitophagy_Removal_k1 = 0.1;
  Mitochondrial_dysfunction: Mito_new + Damage => Mito_old + Damage; compartment*Mitochondrial_dysfunction_k1*Mito_new*Damage;
    Mitochondrial_dysfunction_k1 = 0.0003608;
  Mitogenesis: Mito_turnover => Mito_new; compartment*Mitogenesis_k1*Mito_turnover;
    Mitogenesis_k1 = 100;
  Mitophagy_of_new_mitochondria: Mito_new + Mitophagy => Mito_turnover + Mitophagy; compartment*Mitophagy_of_new_mitochondria_k1*Mito_new*Mitophagy;
    Mitophagy_of_new_mitochondria_k1 = 1;
  Mitophagy_of_old_mitochondria: Mito_old + Mitophagy => Mito_turnover + Mitophagy; compartment*Mitophagy_of_old_mitochondria_k1*Mito_old*Mitophagy;
    Mitophagy_of_old_mitochondria_k1 = 0.0055;
  Mitochondrial_stress_signal: Mito_old => AICAR_treatment + Mito_old; compartment*Hill_Cooperativity(Mito_old, Mitochondrial_stress_signal_Shalve, Mitochondrial_stress_signal_V, Mitochondrial_stress_signal_h);
    Mitochondrial_stress_signal_Shalve = 2; Mitochondrial_stress_signal_V = 0.1; Mitochondrial_stress_signal_h = 20;
  Dummy_Reaction_Mitochondrial_Stress_Signal_Removal: AICAR_treatment => ; compartment*Dummy_Reaction_Mitochondrial_Stress_Signal_Removal_k1*AICAR_treatment;
    Dummy_Reaction_Mitochondrial_Stress_Signal_Removal_k1 = 0.1;

  // Unit definitions:
  unit volume = 1e-3 litre;
  unit time = 3600 second;
  unit substance = 1e-3 mole;
end
